units           metal
dimension	    3
boundary	    p p p
atom_style	    atomic
neighbor	    0.3 bin
neigh_modify    delay 0 check yes

variable        lattice_constant equal 7.04
variable        inital_length equal 20*${lattice_constant}
variable        delta_y equal 0.00025

lattice		    fcc 3.52
region		    box block 0 12 0 12 0 12 units lattice
create_box	    2 box
create_atoms	1 box

pair_style       lj/cut 8.0

pair_coeff      1 1 0.5203 2.282
pair_coeff      2 2 4.1624 4.364
pair_coeff      1 2 2.0812 2.282

mass		    1 58.6934
mass            2 469.5472


region          crack block INF 7 9 12 0 INF units lattice

minimize        1.0e-8 1.0e-8 10000 100000


compute         stress_atom all stress/atom NULL
compute         pe_atom all pe/atom

dump            1 all custom 250 records/TEST_3x3.lammpstrj id type x y z c_pe_atom
dump_modify     1 sort id


thermo_modify   lost ignore

run 500
